# OpenSim document version 30000
InverseKinematicsTool default:
  results_directory: ../../output_osim/walking/inverseKinematics/
  model_file: ../../models/2392_scaled_clusters.osim
  constraint_weight: Inf
  accuracy: 1e-5
  marker_file: ../../unfilteredRawData/walking/walking.trc
  time_range: 0 31.22
  report_errors: true
  output_motion_file: ../../output_osim/walking/inverseKinematics/walking_ik.mot
  report_marker_locations: false
  IKTaskSet:
    IKMarkerTask RACR: apply=true weight=10
    IKMarkerTask LACR: apply=true weight=10
    IKMarkerTask C7: apply=true weight=10
    IKMarkerTask T10: apply=true weight=10
    IKMarkerTask CLAV: apply=true weight=10
    IKMarkerTask STRN: apply=true weight=10
    IKMarkerTask RASH: apply=false weight=25
    IKMarkerTask RPSH: apply=false weight=25
    IKMarkerTask LASH: apply=false weight=25
    IKMarkerTask LPSH: apply=false weight=25
    IKMarkerTask RASI: apply=true weight=1000
    IKMarkerTask LASI: apply=true weight=1000
    IKMarkerTask RPSI: apply=true weight=500
    IKMarkerTask LPSI: apply=true weight=500
    IKMarkerTask LHJC: apply=false weight=25
    IKMarkerTask RHJC: apply=false weight=25
    IKMarkerTask RTHU: apply=true weight=25
    IKMarkerTask RTHC: apply=true weight=25
    IKMarkerTask RTHD: apply=true weight=25
    IKMarkerTask RFCL: apply=false weight=25
    IKMarkerTask RFCM: apply=false weight=25
    IKMarkerTask RTBU: apply=true weight=25
    IKMarkerTask RTBC: apply=true weight=25
    IKMarkerTask RTBD: apply=true weight=25
    IKMarkerTask RMALL: apply=false weight=25
    IKMarkerTask RMALM: apply=false weight=25
    IKMarkerTask RCAL: apply=true weight=33
    IKMarkerTask RMT1: apply=true weight=33
    IKMarkerTask RMT5: apply=true weight=33
    IKMarkerTask LTHU: apply=true weight=25
    IKMarkerTask LTHC: apply=true weight=25
    IKMarkerTask LTHD: apply=true weight=25
    IKMarkerTask LFCL: apply=false weight=25
    IKMarkerTask LFCM: apply=false weight=25
    IKMarkerTask LTBC: apply=true weight=25
    IKMarkerTask LTBU: apply=true weight=25
    IKMarkerTask LTBD: apply=true weight=25
    IKMarkerTask LMALL: apply=false weight=25
    IKMarkerTask LMALM: apply=false weight=25
    IKMarkerTask LCAL: apply=true weight=33
    IKMarkerTask LMT1: apply=true weight=33
    IKMarkerTask LMT5: apply=true weight=33
    IKMarkerTask RTBL: apply=true weight=25
    IKMarkerTask LTBL: apply=true weight=25
    IKMarkerTask RTHM: apply=true weight=25
    IKMarkerTask LTHM: apply=true weight=25
    IKMarkerTask RTCL: apply=false weight=25
    IKMarkerTask RTCM: apply=false weight=25
    IKMarkerTask LTCL: apply=false weight=25
    IKMarkerTask LTCM: apply=false weight=25
    IKMarkerTask RKJC: apply=false weight=25
    IKMarkerTask LKJC: apply=false weight=25
